Id - e^(-e_c*Ψ/(k*T))*(e^(e_c*(Vd - Id*Rf)/(k*T)) - 1)
Id(Vd, T, Rf, Ψ) := -(e_c*Rf*e^(-Ψ*e_c/(T*k)) - T*k*LambertW(e_c*Rf*e^((e_c*Vd - Ψ*e_c + e_c*Rf*e^(-Ψ*e_c/(T*k)))/(T*k))/(T*k)))/(e_c*Rf)
Rf := 40 Ω
e_c = 1.60218e-19 C
k = 1.38065e-23 kg*m^2/(s^2*K)
T := (21 + 273.14) K = 294.14 K
Vd := 0.3 V
Ψ := 0.5 V
e^(-e_c*Ψ/(k*T)) = 2.71043e-9
e_c/(k*T) = 39.4523 1/V
k*T/e_c = 0.0253471 V
